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/batch
! ANSYS input file written by Workbench version 2024 R2
! File used for geometry attach: C:\Users\diles\OneDrive\Desktop\sahil\Double Edge Crack.STEP
/title,wbnew--Static Structural (A5)
/COM,/COM,     ANSYSMotion, 2024.2
/com,--- Data in consistent NMM units. See Solving Units in the help system for more information.
/units,MPA
/prep7
! Turn off shape checking because checks already performed inside WB mesher.
! See help system for more information.
SHPP,OFF,,NOWARN
etcon,set             ! allow ANSYS to choose best KEYOP's for 180x elements, resets any applicable keyopt to MAPDL defaults
/com,*********** Nodes for the whole assembly ***********
nblock,3,,3257
(1i9,3e20.9e3)
        1    -7.105427358E-15    -3.453712511E+00     0.000000000E+00
        2     1.551451027E-14    -8.163250125E+01     0.000000000E+00
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-1
/com,*********** Elements for Body 1 'Double Edge Crack-FreeParts|NONE' ***********
et,1,183
keyo,1,3,2
eblock,19,solid,,1408
(19i9)
        1        1        1        1        0        0        0        0        8        0        1      188      470      273      273     1484     1951      273     1482
        1        1        1        1        0        0        0        0        8        0        2      192      478      587      587     1509     2656      587     1510
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-1
/com,*********** Send User Defined Coordinate System(s) ***********
local,12,0,25.,4.59109283736866e-030,0.,0.,0.,0.
local,13,0,75.,4.59109283736866e-030,0.,0.,0.,0.
csys,0
toffst,273.15,      ! Temperature offset from absolute zero
/com,*********** Set Reference Temperature ***********
tref,22.
/com,*********** Send Materials ***********
Temperature = 'TEMP' ! Temperature
MP,DENS,1,7.85e-09,	! tonne mm^-3
MP,ALPX,1,1.2e-05,	! C^-1
MP,C,1,434000000,	! mm^2 s^-2 C^-1
MP,KXX,1,60.5,	! tonne mm s^-3 C^-1
MP,RSVX,1,0.00017,	! ohm mm
MP,EX,1,200000,	! tonne s^-2 mm^-1
MP,NUXY,1,0.3,
MP,MURX,1,10000,

/com,*********** Send Sheet Properties ***********
!************************* Model Summary ********************
!Double Edge Crack-FreeParts|NONE,	Structural Steel,	matid,	1
!************************* End Model Summary ********************
/com,*********** Send Named Selection as Node Component ***********
CMBLOCK,SELECTION,NODE,        1
(8i10)
       106
/com,*********** Send Named Selection as Node Component ***********
CMBLOCK,SELECTION_2,NODE,        1
(8i10)
        34
CMBLOCK,SELECTION_3,NODE,        1
(8i10)
       106
CMBLOCK,SELECTION_4,NODE,        1
(8i10)
        34
/com,*********** Start Creating Assist Nodes For Crack Calculation ***********
n,2962,25.,4.59109283736866e-030,0.
n,2963,75.,4.59109283736866e-030,0.
/com,*********** Done Creating Assist Nodes For Crack Calculation ***********
/com,*********** Fixed Supports ***********
CMBLOCK,_FIXEDSU,NODE,       13
(8i10)
         2        15        16        17        18        19        20       782
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cmsel,s,_FIXEDSU
d,all,all
nsel,all
/com,*********** Define Pressure Without Surface Effect Elements "Pressure" ***********
CMBLOCK,_CM65_1 ,ELEM,        5
(8i10)
      1144      1183      1185      1200      1280
CMBLOCK,_CM65_4 ,ELEM,        1
(8i10)
      1277
esel,all
fini
/com,****************************************************************************
/com,*************************    SOLUTION       ********************************
/com,****************************************************************************
/solu
antype,0                   ! static analysis
_thickRatio=  0     ! Ratio of thick parts in the model
eqsl,sparse,,,,,1
cntr,print,1               ! print out contact info and also make no initial contact an error
cncheck,dmp		!	Enable program controlled contact splitting for distributed memory parallel run
dmpoption,emat,no             ! Don't combine emat file for DANSYS
dmpoption,esav,no             ! Don't combine esav file for DANSYS
/com,*********** Start Sending CINT Commands For All Cracks ***********
*set,_iAssistNode,2962
*set,_SIFS,1
*set,_CRACK59_FRONT1_SIFS,1
cint,new,1   ! Define crack id for Pre-Meshed Crack
cint,type,SIFS  ! Output quantity for Pre-Meshed Crack
cint,ctnc,SELECTION_3,_iAssistNode  ! Define crack tip node component
cint,ncon,6  ! Define number of contours
cint,normal,12,2  ! Define crack plane normal
*set,_JINT,2
*set,_CRACK59_FRONT1_JINT,2
cint,new,2   ! Define crack id for Pre-Meshed Crack
cint,type,JINT  ! Output quantity for Pre-Meshed Crack
cint,ctnc,SELECTION_3,_iAssistNode  ! Define crack tip node component
cint,ncon,6  ! Define number of contours
cint,normal,12,2  ! Define crack plane normal
*set,_TSTRESS,3
*set,_CRACK59_FRONT1_TSTRESS,3
cint,new,3   ! Define crack id for Pre-Meshed Crack
cint,type,TSTRESS  ! Output quantity for Pre-Meshed Crack
cint,ctnc,SELECTION_3,_iAssistNode  ! Define crack tip node component
cint,ncon,6  ! Define number of contours
cint,normal,12,2  ! Define crack plane normal
*set,_iAssistNode,2963
*set,_SIFS,4
*set,_CRACK61_FRONT1_SIFS,4
cint,new,4   ! Define crack id for Pre-Meshed Crack 2
cint,type,SIFS  ! Output quantity for Pre-Meshed Crack 2
cint,ctnc,SELECTION_4,_iAssistNode  ! Define crack tip node component
cint,ncon,6  ! Define number of contours
cint,normal,13,2  ! Define crack plane normal
*set,_JINT,5
*set,_CRACK61_FRONT1_JINT,5
cint,new,5   ! Define crack id for Pre-Meshed Crack 2
cint,type,JINT  ! Output quantity for Pre-Meshed Crack 2
cint,ctnc,SELECTION_4,_iAssistNode  ! Define crack tip node component
cint,ncon,6  ! Define number of contours
cint,normal,13,2  ! Define crack plane normal
*set,_TSTRESS,6
*set,_CRACK61_FRONT1_TSTRESS,6
cint,new,6   ! Define crack id for Pre-Meshed Crack 2
cint,type,TSTRESS  ! Output quantity for Pre-Meshed Crack 2
cint,ctnc,SELECTION_4,_iAssistNode  ! Define crack tip node component
cint,ncon,6  ! Define number of contours
cint,normal,13,2  ! Define crack plane normal
/com,*********** Done Sending CINT Commands For All Cracks ***********
nldiag,cont,iter           ! print out contact info each equilibrium iteration
rescontrol,,none                 ! Do not keep any restart files
/com,****************************************************
/com,******************* SOLVE FOR LS 1 OF 1 ****************
/com,*********** Set Pressure Without Surface Effect Elements "Pressure" ***********
sfe,_CM65_1,1,pres,1,-100.
sfe,_CM65_4,4,pres,1,-100.
nsel,all
esel,all
esel,all
nsub,1,1,1
time,1.
outres,erase
outres,all,none
outres,nsol,all,
outres,rsol,all
outres,eangl,all
outres,etmp,all
outres,veng,all
outres,strs,all,
outres,epel,all,
outres,eppl,all,
outres,cont,all,
outres,cint,all
! *********** WB SOLVE COMMAND ***********
! check interactive state
*get,ANSINTER_,active,,int
*if,ANSINTER_,ne,0,then
/eof
*endif
solve
/com *************** Write FE CONNECTORS *********
CEWRITE,file,ce,,INTE
/com,****************************************************
/com,*************** FINISHED SOLVE FOR LS 1 *************
*get,_NSOLTHREADS,active,0,ntfs
*get,_NSOLPROCESSES,active,0,npfs
/post1
fini
